# OpenSim document version 20200
Model HPLfullbody_Dynamic:
  publications: List of publications related to model...
  length_units: meters
  force_units: N
  gravity: 0 -9.80665 0
  credits:
    Delp S.L., Loan J.P., Hoy M.G., Zajac F.E., Topp E.L., Rosen J.M., Thelen D.G., Anderson F.C., Seth A., Hamner S.R.
  defaults: Thelen2003Muscle default: min_control=0.01 max_control=1 max_isometric_force=546
      optimal_fiber_length=0.0535 tendon_slack_length=0.078 pennation_angle=0 activation_time_constant=0.01
      deactivation_time_constant=0.04 Vmax=10 Vmax0=5 FmaxTendonStrain=0.033 FmaxMuscleStrain=0.6 KshapeActive=0.5
      KshapePassive=4 damping=0.05 Af=0.3 Flen=1.8
  ForceSet:
    Thelen2003Muscle [values shared by the 15 below unless stated]: min_control=0.01 max_control=1
        activation_time_constant=0.01 deactivation_time_constant=0.04 Vmax=10 Vmax0=5 FmaxTendonStrain=0.033
        FmaxMuscleStrain=0.6 KshapeActive=0.5 KshapePassive=4 damping=0.05 Af=0.3 Flen=1.8
    Thelen2003Muscle CORB: max_isometric_force=159.25 optimal_fiber_length=0.176 tendon_slack_length=0.0001
        pennation_angle=0
      PathPoint P1: r_scapula (0.0125 -0.04127 -0.02652)
      PathPoint P2: r_scapula (0.00483 -0.06958 -0.01563)
      PathPoint P3: humerus_r (0.00743 -0.15048 -0.00782)
    Thelen2003Muscle DELT1: max_isometric_force=1213 optimal_fiber_length=0.1296 tendon_slack_length=0.066
        pennation_angle=0.3839724
      PathPoint P1: humerus_r (0.00896 -0.11883 0.00585)
      PathPoint P2: humerus_r (0.01623 -0.11033 0.00412)
      PathPoint P3: r_scapula (0.04347 -0.03252 0.00099)
      PathPoint P4: r_clavicle (-0.014 0.01106 0.08021)
    Thelen2003Muscle DELT3: max_isometric_force=277 optimal_fiber_length=0.1818 tendon_slack_length=0.01
        pennation_angle=0.3141593
      PathPoint P1: r_scapula (-0.05573 0.00122 -0.02512)
      PathPoint P2: r_scapula (-0.07247 -0.03285 0.01233)
      PathPoint P3: humerus_r (0.00206 -0.07602 0.01045)
    Thelen2003Muscle INFSP: max_isometric_force=1099 optimal_fiber_length=0.10655 tendon_slack_length=0.0058
        pennation_angle=0.3228859
      PathPoint P1: humerus_r (-0.00887 0.00484 0.02448)
      PathPoint P2: r_scapula (-0.07382 -0.05476 -0.04781)
    Thelen2003Muscle SUPSP: max_isometric_force=687 optimal_fiber_length=0.0814 tendon_slack_length=0.0295
        pennation_angle=0.1221731
      PathPoint P1: humerus_r (0.00256 0.01063 0.02593)
      PathPoint P2: r_scapula (-0.01918 0.00127 -0.01271)
      PathPoint P3: r_scapula (-0.044 -0.01512 -0.05855)
    Thelen2003Muscle TMAJ: max_isometric_force=514 optimal_fiber_length=0.1887 tendon_slack_length=0.0001
        pennation_angle=0.2792527
      PathPoint P1: humerus_r (0.00998 -0.05419 -0.00568)
      PathPoint P2: r_scapula (-0.10264 -0.10319 -0.05829)
      PathPoint P3: r_scapula (-0.10489 -0.10895 -0.07117)
    Thelen2003Muscle TMIN: max_isometric_force=223 optimal_fiber_length=0.1281 tendon_slack_length=0.0233
        pennation_angle=0.418879
      PathPoint P1: humerus_r (-0.0011 -0.01264 0.02156)
      PathPoint P2: r_scapula (-0.09473 -0.07991 -0.04737)
      PathPoint P3: r_scapula (-0.09643 -0.08121 -0.05298)
    Thelen2003Muscle BRA: max_isometric_force=819 optimal_fiber_length=0.0535 tendon_slack_length=0.078
        pennation_angle=0.1396263
      PathPoint P1: humerus_r (0.0068 -0.1739 -0.0036)
      ConditionalPathPoint P2: humerus_r (0.01894 -0.28559 -0.01105) range=(0 0.8131489) coordinate=elbow_flex_r
      ConditionalPathPoint P3: ulna_r (0.00498 -0.01463 0.00128) range=(0 0.8131489) coordinate=elbow_flex_r
      PathPoint P4: ulna_r (-0.0032 -0.0239 0.0009)
    Thelen2003Muscle BRD: max_isometric_force=952 optimal_fiber_length=0.089 tendon_slack_length=0.0535
        pennation_angle=0
      PathPoint P1: humerus_r (-0.0098 -0.19963 0.00223)
      PathPoint P2: radius_r (0.03577 -0.12742 0.02315)
      PathPoint P3: radius_r (0.0419 -0.221 0.0224)
    Thelen2003Muscle TRILat: max_isometric_force=602 optimal_fiber_length=0.118 tendon_slack_length=0.098
        pennation_angle=0.1570796
      PathPoint P1: humerus_r (-0.00599 -0.12646 0.00428)
      PathPoint P2: humerus_r (-0.02344 -0.14528 0.00928)
      PathPoint P3: humerus_r (-0.03184 -0.22637 -0.01217)
      PathPoint P4: humerus_r (-0.01743 -0.26757 -0.01208)
      PathPoint P5: ulna_r (-0.0219 0.01046 -0.00078)
    Thelen2003Muscle TRILong: max_isometric_force=770 optimal_fiber_length=0.139 tendon_slack_length=0.143
        pennation_angle=0.2094395
      PathPoint P1: r_scapula (-0.04565 -0.04073 -0.01377)
      PathPoint P2: humerus_r (-0.02714 -0.11441 -0.00664)
      PathPoint P3: humerus_r (-0.03184 -0.22637 -0.01217)
      PathPoint P4: humerus_r (-0.01743 -0.26757 -0.01208)
      PathPoint P5: ulna_r (-0.0219 0.01046 -0.00078)
    Thelen2003Muscle ECRB: max_isometric_force=95.5 optimal_fiber_length=0.0585 tendon_slack_length=0.2223
        pennation_angle=0.1553343
      PathPoint P1: humerus_r (0.01349 -0.29048 0.01698)
      PathPoint P2: radius_r (0.02905 -0.13086 0.02385)
      PathPoint P3: radius_r (0.03549 -0.22805 0.03937)
      PathPoint P4: hand_r (0.00899 -0.02641 0.01082)
    Thelen2003Muscle ECU: max_isometric_force=91 optimal_fiber_length=0.0622 tendon_slack_length=0.2285
        pennation_angle=0.06108652
      PathPoint P1: humerus_r (0.00083 -0.28955 0.0188)
      PathPoint P2: ulna_r (-0.01391 -0.03201 0.02947)
      PathPoint P3: ulna_r (-0.01705 -0.05428 0.02868)
      PathPoint P4: ulna_r (-0.01793 -0.09573 0.03278)
      PathPoint P5: radius_r (-0.01421 -0.22696 0.03481)
      PathPoint P6: hand_r (-0.01851 -0.02907 0.00105)
    Thelen2003Muscle FCR: max_isometric_force=69.65 optimal_fiber_length=0.0628 tendon_slack_length=0.244
        pennation_angle=0.05410521
      PathPoint P1: humerus_r (0.00758 -0.27806 -0.03705)
      PathPoint P2: radius_r (0.0211 -0.21943 0.00127)
      PathPoint P3: hand_r (0.01523 -0.03349 -0.00185)
    Thelen2003Muscle FCU: max_isometric_force=119.7 optimal_fiber_length=0.0509 tendon_slack_length=0.265
        pennation_angle=0.2111848
      PathPoint P1: humerus_r (0.00219 -0.2774 -0.0388)
      PathPoint P2: hand_r (0.00549 0 0)
      PathPoint P3: radius_r (0.01082 -0.22327 0.00969)
      PathPoint P4: hand_r (-0.01636 -0.03271 -0.00519)
    ObjectGroup shoulder_r: members=(CORB DELT1 DELT3 INFSP SUPSP TMAJ TMIN)
    ObjectGroup elbow_r: members=(BRA BRD TRILat TRILong)
    ObjectGroup wrist_r: members=(ECRB ECU FCR FCU)
  BodySet:
    Body ground: mass=0 mass_center=(0 0 0) inertia_xx=0 inertia_yy=0 inertia_zz=0
    Body pelvis: mass=11.777 mass_center=(-0.0707 0 0) inertia_xx=0.1028 inertia_yy=0.0871 inertia_zz=0.0579
        meshes=(sacrum.vtp pelvis.vtp l_pelvis.vtp)
      CustomJoint ground_pelvis: parent_body=ground location_in_parent=(0 0 0) location=(0 0 0)
        Coordinate pelvis_tilt: motion_type=rotational default_value=0.2037811 initial_value=0.2037811
            range=(-1.570796 1.570796) clamped=true
        Coordinate pelvis_list: motion_type=rotational default_value=0.09816473 initial_value=0.09816473
            range=(-1.570796 1.570796) clamped=true
        Coordinate pelvis_rotation: motion_type=rotational default_value=-0.01971049 initial_value=-0.01971049
            range=(-3.570796 3.570796) clamped=true
        Coordinate pelvis_tx: motion_type=translational default_value=-0.3510951 initial_value=-0.3510951 range=(-5 5)
            clamped=true
        Coordinate pelvis_ty: motion_type=translational default_value=0.6065914 initial_value=0.6065914 range=(-1 2)
            clamped=true
        Coordinate pelvis_tz: motion_type=translational default_value=-0.1637695 initial_value=-0.1637695 range=(-3 3)
            clamped=true
        SpatialTransform:
          TransformAxis rotation1: coordinates=pelvis_tilt axis=(0 0 1) LinearFunction(coefficients=1 0)
          TransformAxis rotation2: coordinates=pelvis_list axis=(1 0 0) LinearFunction(coefficients=1 0)
          TransformAxis rotation3: coordinates=pelvis_rotation axis=(0 1 0) LinearFunction(coefficients=1 0)
          TransformAxis translation1: coordinates=pelvis_tx axis=(1 0 0) LinearFunction(coefficients=1 0)
          TransformAxis translation2: coordinates=pelvis_ty axis=(0 1 0) LinearFunction(coefficients=1 0)
          TransformAxis translation3: coordinates=pelvis_tz axis=(0 0 1) LinearFunction(coefficients=1 0)
    Body femur_r: mass=9.3014 mass_center=(0 -0.17 0) inertia_xx=0.1339 inertia_yy=0.0351 inertia_zz=0.1412
        meshes=femur.vtp
      CustomJoint hip_r: parent_body=pelvis location_in_parent=(-0.0707 -0.0661 0.0835) location=(0 0 0)
        Coordinate hip_flexion_r: motion_type=rotational default_value=0 initial_value=0 range=(-2.094395 2.094395)
            clamped=true
        Coordinate hip_adduction_r: motion_type=rotational default_value=0 initial_value=0 range=(-2.094395 2.094395)
            clamped=true
        Coordinate hip_rotation_r: motion_type=rotational default_value=0 initial_value=0 range=(-2.094395 2.094395)
            clamped=true
        SpatialTransform: axes_held_at_zero=(translation1 translation2 translation3)
          TransformAxis rotation1: coordinates=hip_flexion_r axis=(0 0 1) LinearFunction(coefficients=1 0)
          TransformAxis rotation2: coordinates=hip_adduction_r axis=(1 0 0) LinearFunction(coefficients=1 0)
          TransformAxis rotation3: coordinates=hip_rotation_r axis=(0 1 0) LinearFunction(coefficients=1 0)
    Body tibia_r: mass=3.7075 mass_center=(0 -0.1867 0) inertia_xx=0.1504 inertia_yy=0.0551 inertia_zz=0.1511
        meshes=(tibia.vtp fibula.vtp)
      CustomJoint knee_r: parent_body=femur_r location_in_parent=(0 0 0) location=(0 0 0)
        Coordinate knee_angle_r: motion_type=rotational default_value=-1.041518 initial_value=-1.041518
            range=(-2.618 0.1745329) clamped=true
        SpatialTransform: axes_held_at_zero=(rotation2 rotation3 translation3)
          TransformAxis rotation1: coordinates=knee_angle_r axis=(0 0 1) LinearFunction(coefficients=1 0)
          TransformAxis translation1: coordinates=knee_angle_r axis=(1 0 0)
            NaturalCubicSpline: x=(-2.094395 -1.745329 -1.396263 -1.047198 -0.6981317 -0.3490659 -0.1745329 0.1973442 0.337395 0.4901776 1.52146 2.094395)
                y=(-0.0032 0.00179 0.00411 0.0041 0.00212 -0.001 -0.0031 -0.005227 -0.005435 -0.005574 -0.005435 -0.00525)
          TransformAxis translation2: coordinates=knee_angle_r axis=(0 1 0)
            NaturalCubicSpline: x=(-2.094395 -1.22173 -0.5235988 -0.3490659 -0.1745329 0.1591486 2.094395)
                y=(-0.4226 -0.4082 -0.399 -0.3976 -0.3966 -0.395264 -0.396)
    Body talus_r: mass=0.1 mass_center=(0 0 0) inertia_xx=0.051 inertia_yy=0.051 inertia_zz=0.051 meshes=talus.vtp
      CustomJoint ankle_r: parent_body=tibia_r location_in_parent=(0 -0.43 0) location=(0 0 0)
        Coordinate ankle_angle_r: motion_type=rotational default_value=0 initial_value=0 range=(-1.570796 1.570796)
            clamped=true
        SpatialTransform: axes_held_at_zero=(rotation2 rotation3 translation1 translation2 translation3)
          TransformAxis rotation1: coordinates=ankle_angle_r axis=(-0.1050135 -0.1740224 0.9791263)
              LinearFunction(coefficients=1 0)
    Body calcn_r: mass=1.25 mass_center=(0.1 0.03 0) inertia_xx=0.0514 inertia_yy=0.0539 inertia_zz=0.0541
        meshes=foot.vtp
      CustomJoint subtalar_r: parent_body=talus_r location_in_parent=(-0.04877 -0.04195 0.00792) location=(0 0 0)
        Coordinate subtalar_angle_r: motion_type=rotational default_value=0 initial_value=0 range=(-1.570796 1.570796)
            clamped=true locked=true
        SpatialTransform: axes_held_at_zero=(rotation2 rotation3 translation1 translation2 translation3)
          TransformAxis rotation1: coordinates=subtalar_angle_r axis=(0.7871796 0.6047475 -0.1209495)
              LinearFunction(coefficients=1 0)
    Body toes_r: mass=0.2166 mass_center=(0.0346 0.006 -0.0175) inertia_xx=0.051 inertia_yy=0.052 inertia_zz=0.051
        meshes=bofoot.vtp
      CustomJoint mtp_r: parent_body=calcn_r location_in_parent=(0.1788 -0.002 0.00108) location=(0 0 0)
        Coordinate mtp_angle_r: motion_type=rotational default_value=0 initial_value=0 range=(-1.570796 1.570796)
            clamped=true locked=true
        SpatialTransform: axes_held_at_zero=(rotation2 rotation3 translation1 translation2 translation3)
          TransformAxis rotation1: coordinates=mtp_angle_r axis=(-0.5809544 0 0.8139361)
              LinearFunction(coefficients=1 0)
    Body femur_l: mass=9.3014 mass_center=(0 -0.17 0) inertia_xx=0.1339 inertia_yy=0.0351 inertia_zz=0.1412
        meshes=l_femur.vtp
      CustomJoint hip_l: parent_body=pelvis location_in_parent=(-0.0707 -0.0661 -0.0835) location=(0 0 0)
        Coordinate hip_flexion_l: motion_type=rotational default_value=0 initial_value=0 range=(-2.094395 2.094395)
            clamped=true
        Coordinate hip_adduction_l: motion_type=rotational default_value=0 initial_value=0 range=(-2.094395 2.094395)
            clamped=true
        Coordinate hip_rotation_l: motion_type=rotational default_value=0 initial_value=0 range=(-2.094395 2.094395)
            clamped=true
        SpatialTransform: axes_held_at_zero=(translation1 translation2 translation3)
          TransformAxis rotation1: coordinates=hip_flexion_l axis=(0 0 1) LinearFunction(coefficients=1 0)
          TransformAxis rotation2: coordinates=hip_adduction_l axis=(-1 0 0) LinearFunction(coefficients=1 0)
          TransformAxis rotation3: coordinates=hip_rotation_l axis=(0 -1 0) LinearFunction(coefficients=1 0)
    Body tibia_l: mass=3.7075 mass_center=(0 -0.1867 0) inertia_xx=0.1504 inertia_yy=0.0551 inertia_zz=0.1511
        meshes=(l_tibia.vtp l_fibula.vtp)
      CustomJoint knee_l: parent_body=femur_l location_in_parent=(0 0 0) location=(0 0 0)
        Coordinate knee_angle_l: motion_type=rotational default_value=-1.041518 initial_value=-1.041518
            range=(-2.618 0.1745329) clamped=true
        SpatialTransform: axes_held_at_zero=(rotation2 rotation3 translation3)
          TransformAxis rotation1: coordinates=knee_angle_l axis=(0 0 1) LinearFunction(coefficients=1 0)
          TransformAxis translation1: coordinates=knee_angle_l axis=(1 0 0)
            NaturalCubicSpline: x=(-2.094395 -1.745329 -1.396263 -1.047198 -0.6981317 -0.3490659 -0.1745329 0.1973442 0.337395 0.4901776 1.52146 2.094395)
                y=(-0.0032 0.00179 0.00411 0.0041 0.00212 -0.001 -0.0031 -0.005227 -0.005435 -0.005574 -0.005435 -0.00525)
          TransformAxis translation2: coordinates=knee_angle_l axis=(0 1 0)
            NaturalCubicSpline: x=(-2.094395 -1.22173 -0.5235988 -0.3490659 -0.1745329 0.1591486 2.094395)
                y=(-0.4226 -0.4082 -0.399 -0.3976 -0.3966 -0.395264 -0.396)
    Body talus_l: mass=0.1 mass_center=(0 0 0) inertia_xx=0.051 inertia_yy=0.051 inertia_zz=0.051 meshes=l_talus.vtp
      CustomJoint ankle_l: parent_body=tibia_l location_in_parent=(0 -0.43 0) location=(0 0 0)
        Coordinate ankle_angle_l: motion_type=rotational default_value=0 initial_value=0 range=(-1.047198 1.047198)
            clamped=true
        SpatialTransform: axes_held_at_zero=(rotation2 rotation3 translation1 translation2 translation3)
          TransformAxis rotation1: coordinates=ankle_angle_l axis=(0.1050135 0.1740224 0.9791263)
              LinearFunction(coefficients=1 0)
    Body calcn_l: mass=1.25 mass_center=(0.1 0.03 0) inertia_xx=0.0514 inertia_yy=0.0539 inertia_zz=0.0541
        meshes=l_foot.vtp
      CustomJoint subtalar_l: parent_body=talus_l location_in_parent=(-0.04877 -0.04195 -0.00792) location=(0 0 0)
        Coordinate subtalar_angle_l: motion_type=rotational default_value=0 initial_value=0 range=(-1.570796 1.570796)
            clamped=true locked=true
        SpatialTransform: axes_held_at_zero=(rotation2 rotation3 translation1 translation2 translation3)
          TransformAxis rotation1: coordinates=subtalar_angle_l axis=(-0.7871796 -0.6047475 -0.1209495)
              LinearFunction(coefficients=1 0)
    Body toes_l: mass=0.2166 mass_center=(0.0346 0.006 0.0175) inertia_xx=0.051 inertia_yy=0.052 inertia_zz=0.051
        meshes=l_bofoot.vtp
      CustomJoint mtp_l: parent_body=calcn_l location_in_parent=(0.1788 -0.002 -0.00108) location=(0 0 0)
        Coordinate mtp_angle_l: motion_type=rotational default_value=0 initial_value=0 range=(-1.047198 1.047198)
            clamped=true locked=true
        SpatialTransform: axes_held_at_zero=(rotation2 rotation3 translation1 translation2 translation3)
          TransformAxis rotation1: coordinates=mtp_angle_l axis=(0.5809544 0 0.8139361)
              LinearFunction(coefficients=1 0)
    Body torso: mass=26.8266 mass_center=(-0.03 0.32 0) inertia_xx=1.4745 inertia_yy=0.7555 inertia_zz=1.4314
        meshes=(hat_spine.vtp hat_jaw.vtp hat_skull.vtp hat_ribs.vtp)
      CustomJoint back: parent_body=pelvis location_in_parent=(-0.1007 0.0815 0) location=(0 0 0)
        Coordinate lumbar_extension: motion_type=rotational default_value=-0.1569983 initial_value=-0.1569983
            range=(-1.570796 1.570796) clamped=true
        Coordinate lumbar_bending: motion_type=rotational default_value=-0.2353624 initial_value=-0.2353624
            range=(-1.570796 1.570796) clamped=true
        Coordinate lumbar_rotation: motion_type=rotational default_value=0.3134688 initial_value=0.3134688
            range=(-1.570796 1.570796) clamped=true
        SpatialTransform: axes_held_at_zero=(translation1 translation2 translation3)
          TransformAxis rotation1: coordinates=lumbar_extension axis=(0 0 1) LinearFunction(coefficients=1 0)
          TransformAxis rotation2: coordinates=lumbar_bending axis=(1 0 0) LinearFunction(coefficients=1 0)
          TransformAxis rotation3: coordinates=lumbar_rotation axis=(0 1 0) LinearFunction(coefficients=1 0)
    Body humerus_r: mass=2.0325 mass_center=(0 -0.164502 0) inertia_xx=0.111946 inertia_yy=0.054121 inertia_zz=0.113409
        meshes=humerus_rv.vtp
      CustomJoint acromial_r: parent_body=torso location_in_parent=(0.003155 0.3715 0.17) location=(0 0 0)
        Coordinate arm_flex_r: motion_type=rotational default_value=1.570216 initial_value=1.570216
            range=(-1.570796 1.570796) clamped=true
        Coordinate arm_add_r: motion_type=rotational default_value=-0.5007107 initial_value=-0.5007107
            range=(-2.694395 1.570796) clamped=true
        Coordinate arm_rot_r: motion_type=rotational default_value=0.4811487 initial_value=0.4811487
            range=(-3.14159 1.570796) clamped=true
        SpatialTransform: axes_held_at_zero=(translation1 translation2 translation3)
          TransformAxis rotation1: coordinates=arm_flex_r axis=(0 0 1) LinearFunction(coefficients=1 0)
          TransformAxis rotation2: coordinates=arm_add_r axis=(1 0 0) LinearFunction(coefficients=1 0)
          TransformAxis rotation3: coordinates=arm_rot_r axis=(0 1 0) LinearFunction(coefficients=1 0)
    Body ulna_r: mass=0.6075 mass_center=(0 -0.120525 0) inertia_xx=0.102962 inertia_yy=0.05618 inertia_zz=0.053213
        meshes=ulna_rv.vtp
      CustomJoint elbow_r: parent_body=humerus_r location_in_parent=(0.013144 -0.286273 -0.009595) location=(0 0 0)
        Coordinate elbow_flex_r: motion_type=rotational default_value=0.9194428 initial_value=0.9194428 range=(0 2.618)
            clamped=true
        SpatialTransform: axes_held_at_zero=(rotation2 rotation3 translation1 translation2 translation3)
          TransformAxis rotation1: coordinates=elbow_flex_r axis=(0.226047 0.022269 0.9738618)
              LinearFunction(coefficients=1 0)
    Body radius_r: mass=0.6075 mass_center=(0 -0.120525 0) inertia_xx=0.102962 inertia_yy=0.05618 inertia_zz=0.053213
        meshes=radius_rv.vtp
      CustomJoint radioulnar_r: parent_body=ulna_r location_in_parent=(-0.006727 -0.013007 0.026083) location=(0 0 0)
        Coordinate pro_sup_r: motion_type=rotational default_value=1.56872 initial_value=1.56872 range=(0 1.570796)
            clamped=true
        SpatialTransform: axes_held_at_zero=(rotation2 rotation3 translation1 translation2 translation3)
          TransformAxis rotation1: coordinates=pro_sup_r axis=(0.05639803 0.9984065 0.001952)
              LinearFunction(coefficients=1 0)
    Body hand_r: mass=0.4575 mass_center=(0 -0.068095 0) inertia_xx=0.05892 inertia_yy=0.0547 inertia_zz=0.05134
        meshes=(pisiform_rvs.vtp lunate_rvs.vtp scaphoid_rvs.vtp triquetrum_rvs.vtp hamate_rvs.vtp capitate_rvs.vtp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)
      CustomJoint radius_hand_r: parent_body=radius_r location_in_parent=(-0.008797 -0.235841 0.01361) location=(0 0 0)
        Coordinate wrist_flex_r: motion_type=rotational default_value=0 initial_value=0 range=(-1.22173 1.22173)
            clamped=true locked=true
        Coordinate wrist_dev_r: motion_type=rotational default_value=0 initial_value=0 range=(-0.4363323 0.6108652)
            clamped=true locked=true
        SpatialTransform: axes_held_at_zero=(rotation3 translation1 translation2 translation3)
          TransformAxis rotation1: coordinates=wrist_flex_r axis=(0 0 1) LinearFunction(coefficients=1 0)
          TransformAxis rotation2: coordinates=wrist_dev_r axis=(1 0 0) LinearFunction(coefficients=1 0)
    Body humerus_l: mass=2.0325 mass_center=(0 -0.164502 0) inertia_xx=0.111946 inertia_yy=0.054121 inertia_zz=0.113409
        meshes=humerus_lv.vtp
      CustomJoint acromial_l: parent_body=torso location_in_parent=(0.003155 0.3715 -0.17) location=(0 0 0)
        Coordinate arm_flex_l: motion_type=rotational default_value=0 initial_value=0 range=(-1.570796 1.570796)
            clamped=true
        Coordinate arm_add_l: motion_type=rotational default_value=-0.2381019 initial_value=-0.2381019
            range=(-2.694395 1.570796) clamped=true
        Coordinate arm_rot_l: motion_type=rotational default_value=-0.2946667 initial_value=-0.2946667
            range=(-3.14159 1.570796) clamped=true
        SpatialTransform: axes_held_at_zero=(translation1 translation2 translation3)
          TransformAxis rotation1: coordinates=arm_flex_l axis=(0 0 1) LinearFunction(coefficients=1 0)
          TransformAxis rotation2: coordinates=arm_add_l axis=(-1 0 0) LinearFunction(coefficients=1 0)
          TransformAxis rotation3: coordinates=arm_rot_l axis=(0 -1 0) LinearFunction(coefficients=1 0)
    Body ulna_l: mass=0.6075 mass_center=(0 -0.120525 0) inertia_xx=0.102962 inertia_yy=0.05618 inertia_zz=0.053213
        meshes=ulna_lv.vtp
      CustomJoint elbow_l: parent_body=humerus_l location_in_parent=(0.013144 -0.286273 0.009595) location=(0 0 0)
        Coordinate elbow_flex_l: motion_type=rotational default_value=1.259733 initial_value=1.259733 range=(0 2.618)
            clamped=true
        SpatialTransform: axes_held_at_zero=(rotation2 rotation3 translation1 translation2 translation3)
          TransformAxis rotation1: coordinates=elbow_flex_l axis=(-0.226047 -0.022269 0.9738618)
              LinearFunction(coefficients=1 0)
    Body radius_l: mass=0.6075 mass_center=(0 -0.120525 0) inertia_xx=0.102962 inertia_yy=0.05618 inertia_zz=0.053213
        meshes=radius_lv.vtp
      CustomJoint radioulnar_l: parent_body=ulna_l location_in_parent=(-0.006727 -0.013007 -0.026083) location=(0 0 0)
        Coordinate pro_sup_l: motion_type=rotational default_value=0.8002091 initial_value=0.8002091 range=(0 1.570796)
            clamped=true
        SpatialTransform: axes_held_at_zero=(rotation2 rotation3 translation1 translation2 translation3)
          TransformAxis rotation1: coordinates=pro_sup_l axis=(-0.05639803 -0.9984065 0.001952)
              LinearFunction(coefficients=1 0)
    Body hand_l: mass=0.4575 mass_center=(0 -0.068095 0) inertia_xx=0.05892 inertia_yy=0.0547 inertia_zz=0.05134
        meshes=(pisiform_lvs.vtp lunate_lvs.vtp scaphoid_lvs.vtp triquetrum_lvs.vtp hamate_lvs.vtp capitate_lvs.vtp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)
      CustomJoint radius_hand_l: parent_body=radius_l location_in_parent=(-0.008797 -0.235841 -0.01361)
          location=(0 0 0)
        Coordinate wrist_flex_l: motion_type=rotational default_value=0 initial_value=0 range=(-1.22173 1.22173)
            clamped=true locked=true
        Coordinate wrist_dev_l: motion_type=rotational default_value=0 initial_value=0 range=(-0.4363323 0.6108652)
            clamped=true locked=true
        SpatialTransform: axes_held_at_zero=(rotation3 translation1 translation2 translation3)
          TransformAxis rotation1: coordinates=wrist_flex_l axis=(0 0 1) LinearFunction(coefficients=1 0)
          TransformAxis rotation2: coordinates=wrist_dev_l axis=(-1 0 0) LinearFunction(coefficients=1 0)
    Body r_scapula: mass=0.2 mass_center=(0 0 0) inertia_xx=0.05892 inertia_yy=0.0547 inertia_zz=0.05134
        meshes=scapula_rv.vtp
      CustomJoint r_scapulothoracic: parent_body=torso location_in_parent=(0 0.4055 0.161) location=(0 0 0)
        Coordinate scapula_weld_r: motion_type=rotational default_value=0 initial_value=0 range=(-1.22173 1.22173)
            clamped=true locked=true
        SpatialTransform: axes_held_at_zero=(rotation2 rotation3 translation1 translation2 translation3)
          TransformAxis rotation1: coordinates=scapula_weld_r axis=(0 0 1) LinearFunction(coefficients=1 0)
    Body r_clavicle: mass=0.2 mass_center=(0 0 0) inertia_xx=0.05892 inertia_yy=0.0547 inertia_zz=0.05134
        meshes=clavicle_rv.vtp
      CustomJoint r_sternoclavicular: parent_body=torso location_in_parent=(0.027 0.3854 0.025465) location=(0 0 0)
        Coordinate clavicle_weld_r: motion_type=rotational default_value=0 initial_value=0 range=(-1.22173 1.22173)
            clamped=true locked=true
        SpatialTransform: axes_held_at_zero=(rotation2 rotation3 translation1 translation2 translation3)
          TransformAxis rotation1: coordinates=clavicle_weld_r axis=(0 0 1) LinearFunction(coefficients=1 0)
    Body l_scapula: mass=0.2 mass_center=(0 0 0) inertia_xx=0.05892 inertia_yy=0.0547 inertia_zz=0.05134
        meshes=scapula_lv.vtp
      CustomJoint l_scapulothoracic: parent_body=torso location_in_parent=(0 0.4055 -0.161) location=(0 0 0)
        Coordinate scapula_weld_l: motion_type=rotational default_value=0 initial_value=0 range=(-1.22173 1.22173)
            clamped=true locked=true
        SpatialTransform: axes_held_at_zero=(rotation2 rotation3 translation1 translation2 translation3)
          TransformAxis rotation1: coordinates=scapula_weld_l axis=(0 0 -1) LinearFunction(coefficients=1 0)
    Body l_clavicle: mass=0.2 mass_center=(0 0 0) inertia_xx=0.05892 inertia_yy=0.0547 inertia_zz=0.05134
        meshes=clavicle_lv.vtp
      CustomJoint l_sternoclavicular: parent_body=torso location_in_parent=(0.027 0.3854 -0.025465) location=(0 0 0)
        Coordinate clavicle_weld_l: motion_type=rotational default_value=0 initial_value=0 range=(-1.22173 1.22173)
            clamped=true locked=true
        SpatialTransform: axes_held_at_zero=(rotation2 rotation3 translation1 translation2 translation3)
          TransformAxis rotation1: coordinates=clavicle_weld_l axis=(0 0 -1) LinearFunction(coefficients=1 0)
  MarkerSet:
    Marker BladeDefault:RFSH: torso (0.02 0.42 0.15)
    Marker BladeDefault:LFSH: torso (0.02 0.42 -0.15)
    Marker C7: torso (-0.07 0.44 0)
    Marker BladeDefault:STRN: torso (0.04 0.38 0)
    Marker RSJC: humerus_r (0 0 0)
    Marker RUA1: humerus_r (0 -0.05 0.02)
    Marker BladeDefault:RUPA: humerus_r (0 -0.2 0.02)
    Marker RUA3: humerus_r (0.03 -0.13 0.02)
    Marker BladeDefault:RELB: humerus_r (0.00729 -0.28128 0.02786)
    Marker RMEL: humerus_r (0.00175 -0.28389 -0.04029)
    Marker REJC: humerus_r (0.00584 -0.28069 -0.0002)
    Marker RFAsuperior: ulna_r (-0.02 -0.15 0.03)
    Marker RFAradius: radius_r (-0.00316 -0.22312 0.04988)
    Marker RFAulna: radius_r (-0.01531 -0.23272 -0.01839)
    Marker BladeDefault:RIWR: radius_r (-0.01 -0.23187 0.017)
    Marker RHNmid: hand_r (-0.02193 -0.05913 0.00021)
    Marker BladeDefault:ROHAND: hand_r (-0.03013 -0.02726 -0.01715)
    Marker BladeDefault:RIHAND: hand_r (-0.01901 -0.02517 0.02667)
    Marker LSJC: humerus_l (0 0 0)
    Marker LUA1: humerus_l (0 -0.05 -0.02)
    Marker BladeDefault:LUPA: humerus_l (0 -0.2 -0.02)
    Marker LUA3: humerus_l (0.03 -0.13 -0.02)
    Marker BladeDefault:LELB: humerus_l (0.00729 -0.28128 -0.02786)
    Marker LMEL: humerus_l (0.00175 -0.28389 0.04029)
    Marker LEJC: humerus_l (0.00584 -0.28069 0.0002)
    Marker LFAsuperior: ulna_l (-0.02 -0.15 -0.03)
    Marker LFAradius: radius_l (-0.00316 -0.22312 -0.04988)
    Marker LFAulna: radius_l (-0.01531 -0.23272 0.01839)
    Marker LWJC: radius_l (-0.01 -0.23187 -0.017)
    Marker LHNmid: hand_l (-0.02231 -0.05623 0.00042)
    Marker BladeDefault:LOHAND: hand_l (-0.02793 -0.01641 0.0244)
    Marker LHN2: hand_l (-0.00386 -0.02153 -0.0276)
    Marker BladeDefault:RFWT: pelvis (0.02 0 0.128)
    Marker BladeDefault:LFWT: pelvis (0.02 0 -0.128)
    Marker LPSI: pelvis (-0.16 0.04 -0.05)
    Marker RPSI: pelvis (-0.16 0.04 0.05)
